*HEADING
Model: Blade2


*INCLUDE,INPUT=BladeMesh_2.inp

*MATERIAL,NAME=MAT1
*ELASTIC
210E9,.3
*DENSITY
7.8E3


*SOLID SECTION,ELSET=C3D10,MATERIAL=MAT1


** *BOUNDARY
** boundary, 1, 3

*STEP
*FREQUENCY,SOLVER=MATRIXSTORAGE
*END STEP


** *STEP
** *FREQUENCY
** 40
** *NODE FILE
** U
** *EL FILE
** S
** *END STEP
